OpenVSP model (file version 5), 7 components.
Geometry view with OpenVSP parameter names; values to 6 digits, angles in degrees, lengths in the model's unit.
Overall bounding box: X_Min=0 X_Len=590.513 Y_Min=-226.257 Y_Len=452.515 Z_Min=0 Z_Len=184.173

Stack "FuselageUpdated"
  location (X Y Z) 100 0 88, rotation 0 0 0
  bounding box size 485 61.1118 76.4689
  cross sections:
    n  XDelta  YDelta  ZDelta   shape
    0  0       0       0        point
    1  95      0       17.7787  general fuselage BotStr=1.5 BotTanAngle=90 CornerRad=0 Height=72.5 LowStr=1.3 MaxWidthLoc=-0.118182 TopStr=1.45 TopTanAngle=90 UpStr=1.5 Width=55
    2  80      0       4        general fuselage BotStr=1.5 BotTanAngle=90 CornerRad=0 Height=65 LowStr=1.35 MaxWidthLoc=-0.11818 TopStr=1.45 TopTanAngle=90 UpStr=1.5 Width=55
    3  80      0       10       general fuselage BotStr=0.25 BotTanAngle=0 CornerRad=0.386364 Height=35 LowStr=0.25 MaxWidthLoc=-0.11818 TopStr=1 TopTanAngle=90 UpStr=1 Width=27
    4  170     0       5.5      general fuselage BotStr=0 BotTanAngle=0.1 CornerRad=0.5 Height=24 LowStr=0 MaxWidthLoc=0 TopStr=0.83 TopTanAngle=90 UpStr=0.83 Width=24
    5  60      0       4        point

Wing "VerticalTail", child of "FuselageUpdated"
  location (X Y Z) 536.739 0 129.218, rotation 90 0 0; relative location 0 0 -8, rotation 90 0 0
  bounding box size 53.7743 7.20312 51
  totals: TotalSpan=51 TotalProjectedSpan=51 TotalChord=45 TotalArea=2295 TotalAR=1.13333
  root: chord 48, twist 0, NACA 4-series Camber=0 CamberLoc=0.2 ThickChord=0.15
  sections:
    n  Span  Root_Chord  Tip_Chord  Area  Sweep  Sweep_Location  Dihedral  Twist  Twist_Location  tip airfoil
    1  51    48          42         2295  13     0               0         0      0.25            NACA 4-series Camber=0 CamberLoc=0.2 ThickChord=0.1
  SS_Control "SS_CONT_0": UStart=0.359756 UEnd=0.640244 Length_C_Start=0.333 Length_C_End=0.333 Length_Start=15.8256 Length_End=14.1444 LE_Flag=0 Surf_Type=2

Wing "Tail", child of "VerticalTail"
  location (X Y Z) 548.513 0 180.218, rotation 0 0 0; relative location 0 0 0, rotation 0 0 0
  symmetric about XZ
  bounding box size 42.0055 195.522 6.35104
  totals: TotalSpan=192 TotalProjectedSpan=192 TotalChord=33 TotalArea=6336 TotalAR=5.81818
  root: chord 42, twist 0, NACA 4-series Camber=0.02 CamberLoc=0.4 ThickChord=0.15
  sections:
    n  Span  Root_Chord  Tip_Chord  Area  Sweep    Sweep_Location  Dihedral  Twist  Twist_Location  tip airfoil
    1  96    42          24         3168  10.6197  0               0         0      0.25            as above

Wing "Wing", child of "FuselageUpdated"
  location (X Y Z) 188.722 0 137.239, rotation 0 0 0; relative location -26.596 0 -7, rotation 0 0 0
  symmetric about XZ
  bounding box size 93.4031 452.515 29.6713
  totals: TotalSpan=454.34 TotalProjectedSpan=452.07 TotalChord=59.0513 TotalArea=24597.8 TotalAR=8.30835
  root: chord 74, twist 0, NACA 4-series Camber=0.02 CamberLoc=0.4 ThickChord=0.157
  sections:
    n  Span   Root_Chord  Tip_Chord  Area     Sweep  Sweep_Location  Dihedral  Twist  Twist_Location  tip airfoil
    1  20     74          74         1480     0      0               0         0      1               as above
    2  110    74          50         6820     -10    0               6         0      0               as above
    3  97.17  50          32.3077    3998.92  5      0               6         -5     0.25            as above
  SS_Control "SS_CONT_0": UStart=0.425 UEnd=0.575 Length_C_Start=0.35 Length_C_End=0.35 Length_Start=24.85 Length_End=18.55 LE_Flag=0 Surf_Type=2
  SS_Control "SS_CONT_1": UStart=0.621951 UEnd=0.780488 Length_C_Start=0.35 Length_C_End=0.35 Length_Start=16.816 Length_End=11.9063 LE_Flag=0 Surf_Type=2

Ellipsoid "WingAC", child of "Wing"
  location (X Y Z) 207.222 0 139.739, rotation 0 90 0; relative location 18.5 0 2.5, rotation 0 90 0
  bounding box size 6 6 6
  Design: A_Radius=3 B_Radius=3 C_Radius=3

Blank "Datum"
  location (X Y Z) 100 0 100, rotation 0 0 0

Ellipsoid "CG"
  location (X Y Z) 262.614 0 115.861, rotation 0 0 0
  bounding box size 6 6 6
  Design: A_Radius=3 B_Radius=3 C_Radius=3

User parameters
  VTOL:DiskArea = 3.33333  (Disk Area)
  VTOL:DiskLoading = 50  (Disk Loading)
  VTOL:GrossWeight = 5000  (Gross Weight)
  VTOL:Naft = 20  (Number of disks in aft array)
  VTOL:Nfwd = 10  (Number of disks in forward array)
  VTOL:Spac = 0  (Spac)
  eVTOL:DiscLoading = 19.8944  (DiscLoading of Vehicle in Pounds/ft^2)
  eVTOL:TOGW = 6000  (Takeoff gross weight of the vehicle)
  eVTOL:TotalDiskArea = 0  (Total disc area in vertical flight)
  eVTOL:TotalWingArea = 0  (Total wing area)
  eVTOL:WingLoading = 25.368  (WingLoading of Vehicle in Pounds/ft^2)

Advanced link "genRefWing"
  input FrontWingArea = (not in this file)
  input AftWingArea = (not in this file)
  input AftWingSpan = (not in this file)
  output RefWingProjSpan = (not in this file)
  output RefWingArea = (not in this file)
    RefWingArea = FrontWingArea + AftWingArea;
    RefWingProjSpan = AftWingSpan;

Advanced link "genRefWing"
  input FrontWingArea = (not in this file)
  input AftWingArea = (not in this file)
  input AftWingSpan = (not in this file)
  output RefWingProjSpan = (not in this file)
  output RefWingArea = (not in this file)
    RefWingArea = FrontWingArea + AftWingArea;
    RefWingProjSpan = AftWingSpan;

Advanced link "genRefWing"
  input FrontWingArea = (not in this file)
  input AftWingArea = (not in this file)
  input AftWingSpan = (not in this file)
  output RefWingProjSpan = (not in this file)
  output RefWingArea = (not in this file)
    RefWingArea = FrontWingArea + AftWingArea;
    RefWingProjSpan = AftWingSpan;

Advanced link "genRefWing"
  input FrontWingArea = (not in this file)
  input AftWingArea = (not in this file)
  input AftWingSpan = (not in this file)
  output RefWingProjSpan = (not in this file)
  output RefWingArea = (not in this file)
    RefWingArea = FrontWingArea + AftWingArea;
    RefWingProjSpan = AftWingSpan;

Advanced link "DiskLoading"
  input DL = UserParm:VTOL:DiskLoading
  input GW = UserParm:VTOL:GrossWeight
  input Spac = UserParm:VTOL:Spac
  input Nfwd = UserParm:VTOL:Nfwd
  input Naft = UserParm:VTOL:Naft
  output SDisk = UserParm:VTOL:DiskArea
  output Noutfwd = (not in this file)
  output Noutaft = (not in this file)
  output SemiSpanfwd = (not in this file)
  output SemiSpanaft = (not in this file)
  output Diamaft = (not in this file)
  output Diamfwd = (not in this file)
  output Offsetfwd = (not in this file)
  output Offsetaft = (not in this file)
    double NDisk = Nfwd + Naft;

    SDisk = (GW/DL)/NDisk;
    double Diam = 2.0 * sqrt(SDisk / 3.1415926);

    Noutfwd = Nfwd / 2;
    Noutaft = Naft / 2;

    Offsetfwd = 2.25 + Diam * 0.5;
    Offsetaft = 2.25 + Diam * 0.5;

    SemiSpanfwd = Offsetfwd + Diam*(Spac+1)*(Noutfwd-1);
    SemiSpanaft = Offsetaft + Diam*(Spac+1)*(Noutaft-1);

    Diamfwd = Diam;
    Diamaft = Diam;

Advanced link "genRefWing"
  input FrontWingArea = (not in this file)
  input AftWingArea = (not in this file)
  input AftWingSpan = (not in this file)
  output RefWingProjSpan = (not in this file)
  output RefWingArea = (not in this file)
    RefWingArea = FrontWingArea + AftWingArea;
    RefWingProjSpan = AftWingSpan;

Advanced link "genRefWing"
  input FrontWingArea = (not in this file)
  input AftWingArea = (not in this file)
  input AftWingSpan = (not in this file)
  output RefWingProjSpan = (not in this file)
  output RefWingArea = (not in this file)
    RefWingArea = FrontWingArea + AftWingArea;
    RefWingProjSpan = AftWingSpan;

Advanced link "genRefWing"
  input FrontWingArea = (not in this file)
  input AftWingArea = (not in this file)
  input AftWingSpan = (not in this file)
  output RefWingProjSpan = (not in this file)
  output RefWingArea = (not in this file)
    RefWingArea = FrontWingArea + AftWingArea;
    RefWingProjSpan = AftWingSpan;

Advanced link "genRefWing"
  input FrontWingArea = (not in this file)
  input AftWingArea = (not in this file)
  input AftWingSpan = (not in this file)
  output RefWingProjSpan = (not in this file)
  output RefWingArea = (not in this file)
    RefWingArea = FrontWingArea + AftWingArea;
    RefWingProjSpan = AftWingSpan;

Advanced link "DiskLoading"
  input DL = UserParm:VTOL:DiskLoading
  input GW = UserParm:VTOL:GrossWeight
  input Spac = UserParm:VTOL:Spac
  input Nfwd = UserParm:VTOL:Nfwd
  input Naft = UserParm:VTOL:Naft
  output SDisk = UserParm:VTOL:DiskArea
  output Noutfwd = (not in this file)
  output Noutaft = (not in this file)
  output SemiSpanfwd = (not in this file)
  output SemiSpanaft = (not in this file)
  output Diamaft = (not in this file)
  output Diamfwd = (not in this file)
  output Offsetfwd = (not in this file)
  output Offsetaft = (not in this file)
    double NDisk = Nfwd + Naft;

    SDisk = (GW/DL)/NDisk;
    double Diam = 2.0 * sqrt(SDisk / 3.1415926);

    Noutfwd = Nfwd / 2;
    Noutaft = Naft / 2;

    Offsetfwd = 2.25 + Diam * 0.5;
    Offsetaft = 2.25 + Diam * 0.5;

    SemiSpanfwd = Offsetfwd + Diam*(Spac+1)*(Noutfwd-1);
    SemiSpanaft = Offsetaft + Diam*(Spac+1)*(Noutaft-1);

    Diamfwd = Diam;
    Diamaft = Diam;

Advanced link "genRefWing"
  input FrontWingArea = (not in this file)
  input AftWingArea = (not in this file)
  input AftWingSpan = (not in this file)
  output RefWingProjSpan = (not in this file)
  output RefWingArea = (not in this file)
    RefWingArea = FrontWingArea + AftWingArea;
    RefWingProjSpan = AftWingSpan;

Advanced link "genRefWing"
  input FrontWingArea = (not in this file)
  input AftWingArea = (not in this file)
  input AftWingSpan = (not in this file)
  output RefWingProjSpan = (not in this file)
  output RefWingArea = (not in this file)
    RefWingArea = FrontWingArea + AftWingArea;
    RefWingProjSpan = AftWingSpan;

Advanced link "genRefWing"
  input FrontWingArea = (not in this file)
  input AftWingArea = (not in this file)
  input AftWingSpan = (not in this file)
  output RefWingProjSpan = (not in this file)
  output RefWingArea = (not in this file)
    RefWingArea = FrontWingArea + AftWingArea;
    RefWingProjSpan = AftWingSpan;

Advanced link "genRefWing"
  input FrontWingArea = (not in this file)
  input AftWingArea = (not in this file)
  input AftWingSpan = (not in this file)
  output RefWingProjSpan = (not in this file)
  output RefWingArea = (not in this file)
    RefWingArea = FrontWingArea + AftWingArea;
    RefWingProjSpan = AftWingSpan;

Advanced link "DiskLoading"
  input DL = UserParm:VTOL:DiskLoading
  input GW = UserParm:VTOL:GrossWeight
  input Spac = UserParm:VTOL:Spac
  input Nfwd = UserParm:VTOL:Nfwd
  input Naft = UserParm:VTOL:Naft
  output SDisk = UserParm:VTOL:DiskArea
  output Noutfwd = (not in this file)
  output Noutaft = (not in this file)
  output SemiSpanfwd = (not in this file)
  output SemiSpanaft = (not in this file)
  output Diamaft = (not in this file)
  output Diamfwd = (not in this file)
  output Offsetfwd = (not in this file)
  output Offsetaft = (not in this file)
    double NDisk = Nfwd + Naft;

    SDisk = (GW/DL)/NDisk;
    double Diam = 2.0 * sqrt(SDisk / 3.1415926);

    Noutfwd = Nfwd / 2;
    Noutaft = Naft / 2;

    Offsetfwd = 2.25 + Diam * 0.5;
    Offsetaft = 2.25 + Diam * 0.5;

    SemiSpanfwd = Offsetfwd + Diam*(Spac+1)*(Noutfwd-1);
    SemiSpanaft = Offsetaft + Diam*(Spac+1)*(Noutaft-1);

    Diamfwd = Diam;
    Diamaft = Diam;

Advanced link "genRefWing"
  input FrontWingArea = (not in this file)
  input AftWingArea = (not in this file)
  input AftWingSpan = (not in this file)
  output RefWingProjSpan = (not in this file)
  output RefWingArea = (not in this file)
    RefWingArea = FrontWingArea + AftWingArea;
    RefWingProjSpan = AftWingSpan;

Advanced link "genRefWing"
  input FrontWingArea = (not in this file)
  input AftWingArea = (not in this file)
  input AftWingSpan = (not in this file)
  output RefWingProjSpan = (not in this file)
  output RefWingArea = (not in this file)
    RefWingArea = FrontWingArea + AftWingArea;
    RefWingProjSpan = AftWingSpan;

Advanced link "genRefWing"
  input FrontWingArea = (not in this file)
  input AftWingArea = (not in this file)
  input AftWingSpan = (not in this file)
  output RefWingProjSpan = (not in this file)
  output RefWingArea = (not in this file)
    RefWingArea = FrontWingArea + AftWingArea;
    RefWingProjSpan = AftWingSpan;

Advanced link "genRefWing"
  input FrontWingArea = (not in this file)
  input AftWingArea = (not in this file)
  input AftWingSpan = (not in this file)
  output RefWingProjSpan = (not in this file)
  output RefWingArea = (not in this file)
    RefWingArea = FrontWingArea + AftWingArea;
    RefWingProjSpan = AftWingSpan;

Advanced link "DiskLoading"
  input DL = UserParm:VTOL:DiskLoading
  input GW = UserParm:VTOL:GrossWeight
  input Spac = UserParm:VTOL:Spac
  input Nfwd = UserParm:VTOL:Nfwd
  input Naft = UserParm:VTOL:Naft
  output SDisk = UserParm:VTOL:DiskArea
  output Noutfwd = (not in this file)
  output Noutaft = (not in this file)
  output SemiSpanfwd = (not in this file)
  output SemiSpanaft = (not in this file)
  output Diamaft = (not in this file)
  output Diamfwd = (not in this file)
  output Offsetfwd = (not in this file)
  output Offsetaft = (not in this file)
    double NDisk = Nfwd + Naft;

    SDisk = (GW/DL)/NDisk;
    double Diam = 2.0 * sqrt(SDisk / 3.1415926);

    Noutfwd = Nfwd / 2;
    Noutaft = Naft / 2;

    Offsetfwd = 2.25 + Diam * 0.5;
    Offsetaft = 2.25 + Diam * 0.5;

    SemiSpanfwd = Offsetfwd + Diam*(Spac+1)*(Noutfwd-1);
    SemiSpanaft = Offsetaft + Diam*(Spac+1)*(Noutaft-1);

    Diamfwd = Diam;
    Diamaft = Diam;

Advanced link "DiskLoading"
  input DL = UserParm:VTOL:DiskLoading
  input GW = UserParm:VTOL:GrossWeight
  input Spac = UserParm:VTOL:Spac
  input Nfwd = UserParm:VTOL:Nfwd
  input Naft = UserParm:VTOL:Naft
  output SDisk = UserParm:VTOL:DiskArea
  output Noutfwd = (not in this file)
  output Noutaft = (not in this file)
  output SemiSpanfwd = (not in this file)
  output SemiSpanaft = (not in this file)
  output Diamaft = (not in this file)
  output Diamfwd = (not in this file)
  output Offsetfwd = (not in this file)
  output Offsetaft = (not in this file)
    double NDisk = Nfwd + Naft;

    SDisk = (GW/DL)/NDisk;
    double Diam = 2.0 * sqrt(SDisk / 3.1415926);

    Noutfwd = Nfwd / 2;
    Noutaft = Naft / 2;

    Offsetfwd = 2.25 + Diam * 0.5;
    Offsetaft = 2.25 + Diam * 0.5;

    SemiSpanfwd = Offsetfwd + Diam*(Spac+1)*(Noutfwd-1);
    SemiSpanaft = Offsetaft + Diam*(Spac+1)*(Noutaft-1);

    Diamfwd = Diam;
    Diamaft = Diam;

Advanced link "DiskLoading"
  input DL = UserParm:VTOL:DiskLoading
  input GW = UserParm:VTOL:GrossWeight
  input Spac = UserParm:VTOL:Spac
  input Nfwd = UserParm:VTOL:Nfwd
  input Naft = UserParm:VTOL:Naft
  output SDisk = UserParm:VTOL:DiskArea
  output Noutfwd = (not in this file)
  output Noutaft = (not in this file)
  output SemiSpanfwd = (not in this file)
  output SemiSpanaft = (not in this file)
  output Diamaft = (not in this file)
  output Diamfwd = (not in this file)
  output Offsetfwd = (not in this file)
  output Offsetaft = (not in this file)
    double NDisk = Nfwd + Naft;

    SDisk = (GW/DL)/NDisk;
    double Diam = 2.0 * sqrt(SDisk / 3.1415926);

    Noutfwd = Nfwd / 2;
    Noutaft = Naft / 2;

    Offsetfwd = 2.25 + Diam * 0.5;
    Offsetaft = 2.25 + Diam * 0.5;

    SemiSpanfwd = Offsetfwd + Diam*(Spac+1)*(Noutfwd-1);
    SemiSpanaft = Offsetaft + Diam*(Spac+1)*(Noutaft-1);

    Diamfwd = Diam;
    Diamaft = Diam;

Advanced link "DiskLoading"
  input DL = UserParm:VTOL:DiskLoading
  input GW = UserParm:VTOL:GrossWeight
  input Spac = UserParm:VTOL:Spac
  input Nfwd = UserParm:VTOL:Nfwd
  input Naft = UserParm:VTOL:Naft
  output SDisk = UserParm:VTOL:DiskArea
  output Noutfwd = (not in this file)
  output Noutaft = (not in this file)
  output SemiSpanfwd = (not in this file)
  output SemiSpanaft = (not in this file)
  output Diamaft = (not in this file)
  output Diamfwd = (not in this file)
  output Offsetfwd = (not in this file)
  output Offsetaft = (not in this file)
    double NDisk = Nfwd + Naft;

    SDisk = (GW/DL)/NDisk;
    double Diam = 2.0 * sqrt(SDisk / 3.1415926);

    Noutfwd = Nfwd / 2;
    Noutaft = Naft / 2;

    Offsetfwd = 2.25 + Diam * 0.5;
    Offsetaft = 2.25 + Diam * 0.5;

    SemiSpanfwd = Offsetfwd + Diam*(Spac+1)*(Noutfwd-1);
    SemiSpanaft = Offsetaft + Diam*(Spac+1)*(Noutaft-1);

    Diamfwd = Diam;
    Diamaft = Diam;

Advanced link "DiskLoading"
  input DL = UserParm:VTOL:DiskLoading
  input GW = UserParm:VTOL:GrossWeight
  input Spac = UserParm:VTOL:Spac
  input Nfwd = UserParm:VTOL:Nfwd
  input Naft = UserParm:VTOL:Naft
  output SDisk = UserParm:VTOL:DiskArea
  output Noutfwd = (not in this file)
  output Noutaft = (not in this file)
  output SemiSpanfwd = (not in this file)
  output SemiSpanaft = (not in this file)
  output Diamaft = (not in this file)
  output Diamfwd = (not in this file)
  output Offsetfwd = (not in this file)
  output Offsetaft = (not in this file)
    double NDisk = Nfwd + Naft;

    SDisk = (GW/DL)/NDisk;
    double Diam = 2.0 * sqrt(SDisk / 3.1415926);

    Noutfwd = Nfwd / 2;
    Noutaft = Naft / 2;

    Offsetfwd = 2.25 + Diam * 0.5;
    Offsetaft = 2.25 + Diam * 0.5;

    SemiSpanfwd = Offsetfwd + Diam*(Spac+1)*(Noutfwd-1);
    SemiSpanaft = Offsetaft + Diam*(Spac+1)*(Noutaft-1);

    Diamfwd = Diam;
    Diamaft = Diam;

Advanced link "DiskLoading"
  input DL = UserParm:VTOL:DiskLoading
  input GW = UserParm:VTOL:GrossWeight
  input Spac = UserParm:VTOL:Spac
  input Nfwd = UserParm:VTOL:Nfwd
  input Naft = UserParm:VTOL:Naft
  output SDisk = UserParm:VTOL:DiskArea
  output Noutfwd = (not in this file)
  output Noutaft = (not in this file)
  output SemiSpanfwd = (not in this file)
  output SemiSpanaft = (not in this file)
  output Diamaft = (not in this file)
  output Diamfwd = (not in this file)
  output Offsetfwd = (not in this file)
  output Offsetaft = (not in this file)
    double NDisk = Nfwd + Naft;

    SDisk = (GW/DL)/NDisk;
    double Diam = 2.0 * sqrt(SDisk / 3.1415926);

    Noutfwd = Nfwd / 2;
    Noutaft = Naft / 2;

    Offsetfwd = 2.25 + Diam * 0.5;
    Offsetaft = 2.25 + Diam * 0.5;

    SemiSpanfwd = Offsetfwd + Diam*(Spac+1)*(Noutfwd-1);
    SemiSpanaft = Offsetaft + Diam*(Spac+1)*(Noutaft-1);

    Diamfwd = Diam;
    Diamaft = Diam;

Advanced link "DiskLoading"
  input DL = UserParm:VTOL:DiskLoading
  input GW = UserParm:VTOL:GrossWeight
  input Spac = UserParm:VTOL:Spac
  input Nfwd = UserParm:VTOL:Nfwd
  input Naft = UserParm:VTOL:Naft
  output SDisk = UserParm:VTOL:DiskArea
  output Noutfwd = (not in this file)
  output Noutaft = (not in this file)
  output SemiSpanfwd = (not in this file)
  output SemiSpanaft = (not in this file)
  output Diamaft = (not in this file)
  output Diamfwd = (not in this file)
  output Offsetfwd = (not in this file)
  output Offsetaft = (not in this file)
    double NDisk = Nfwd + Naft;

    SDisk = (GW/DL)/NDisk;
    double Diam = 2.0 * sqrt(SDisk / 3.1415926);

    Noutfwd = Nfwd / 2;
    Noutaft = Naft / 2;

    Offsetfwd = 2.25 + Diam * 0.5;
    Offsetaft = 2.25 + Diam * 0.5;

    SemiSpanfwd = Offsetfwd + Diam*(Spac+1)*(Noutfwd-1);
    SemiSpanaft = Offsetaft + Diam*(Spac+1)*(Noutaft-1);

    Diamfwd = Diam;
    Diamaft = Diam;

Advanced link "DiskLoading"
  input DL = UserParm:VTOL:DiskLoading
  input GW = UserParm:VTOL:GrossWeight
  input Spac = UserParm:VTOL:Spac
  input Nfwd = UserParm:VTOL:Nfwd
  input Naft = UserParm:VTOL:Naft
  output SDisk = UserParm:VTOL:DiskArea
  output Noutfwd = (not in this file)
  output Noutaft = (not in this file)
  output SemiSpanfwd = (not in this file)
  output SemiSpanaft = (not in this file)
  output Diamaft = (not in this file)
  output Diamfwd = (not in this file)
  output Offsetfwd = (not in this file)
  output Offsetaft = (not in this file)
    double NDisk = Nfwd + Naft;

    SDisk = (GW/DL)/NDisk;
    double Diam = 2.0 * sqrt(SDisk / 3.1415926);

    Noutfwd = Nfwd / 2;
    Noutaft = Naft / 2;

    Offsetfwd = 2.25 + Diam * 0.5;
    Offsetaft = 2.25 + Diam * 0.5;

    SemiSpanfwd = Offsetfwd + Diam*(Spac+1)*(Noutfwd-1);
    SemiSpanaft = Offsetaft + Diam*(Spac+1)*(Noutaft-1);

    Diamfwd = Diam;
    Diamaft = Diam;

Advanced link "genRefWing"
  input FrontWingArea = (not in this file)
  input AftWingArea = (not in this file)
  input AftWingSpan = (not in this file)
  output RefWingProjSpan = (not in this file)
  output RefWingArea = (not in this file)
    RefWingArea = FrontWingArea + AftWingArea;
    RefWingProjSpan = AftWingSpan;

Advanced link "genRefWing"
  input FrontWingArea = (not in this file)
  input AftWingArea = (not in this file)
  input AftWingSpan = (not in this file)
  output RefWingProjSpan = (not in this file)
  output RefWingArea = (not in this file)
    RefWingArea = FrontWingArea + AftWingArea;
    RefWingProjSpan = AftWingSpan;

Advanced link "genRefWing"
  input FrontWingArea = (not in this file)
  input AftWingArea = (not in this file)
  input AftWingSpan = (not in this file)
  output RefWingProjSpan = (not in this file)
  output RefWingArea = (not in this file)
    RefWingArea = FrontWingArea + AftWingArea;
    RefWingProjSpan = AftWingSpan;

VSPAERO settings: Sref=16850.7 bref=427.441 cref=41.1794 Xcg=297.18 Ycg=0 Zcg=133.17 AlphaStart=-4 AlphaEnd=10 AlphaNpts=8 BetaStart=0 BetaEnd=0 BetaNpts=1 MachStart=0 MachEnd=0 MachNpts=1 ReCref=1e+07 Vinf=100 Rho=0.002377
  control group "Elevator": DeflectionAngle=1.17647
