OpenVSP model (file version 5), 6 components.
Geometry view with OpenVSP parameter names; values to 6 digits, angles in degrees, lengths in the model's unit.
Overall bounding box: X_Min=-0.435437 X_Len=8.45132 Y_Min=-5.59729 Y_Len=11.1946 Z_Min=-0.528874 Z_Len=2.69871

Fuselage "Fuselage"
  location (X Y Z) 0 0 0, rotation 0 0 0
  bounding box size 7.49198 1.25851 1.59863
  mass: Density=100 Shell_Flag=0 Mass_Area=1 Mass_Prior=0
  Design: Length=7.49198
  cross sections:
    n  XLocPercent  YLocPercent  ZLocPercent   shape
    0  0            0            0.0184378     point
    1  0.000101709  0            0.0184378     circle Circle_Diameter=0.313639
    2  0.00849878   0            0.0206957     general fuselage BotStr=0.5632 BotTanAngle=90 CornerRad=0.5 Height=0.471708 LowStr=1.3441 MaxWidthLoc=0.3 TopStr=1.1254 TopTanAngle=90 UpStr=1.2816 Width=0.859841
    3  0.0455289    0            -0.000899105  general fuselage BotStr=1 BotTanAngle=90 CornerRad=0 Height=0.896264 LowStr=0.83 MaxWidthLoc=0.25 TopStr=1.75 TopTanAngle=90 UpStr=0.5 Width=1.04321
    4  0.152522     0            0.00406835    general fuselage BotStr=1.5 BotTanAngle=90 CornerRad=0 Height=1.08494 LowStr=1 MaxWidthLoc=0.15 TopStr=1.5 TopTanAngle=90 UpStr=1 Width=1.143
    5  0.258625     0            0.0332954     general fuselage BotStr=0.83 BotTanAngle=90 CornerRad=0 Height=1.55664 LowStr=0.83 MaxWidthLoc=-0.3 TopStr=1.75 TopTanAngle=90 UpStr=2 Width=1.17348
    6  0.451212     0            0.037795      general fuselage BotStr=0.83 BotTanAngle=90 CornerRad=0 Height=1.32079 LowStr=0.83 MaxWidthLoc=-0.3 TopStr=1.75 TopTanAngle=90 UpStr=2 Width=1.15824
    7  0.603458     0            0.0314972     general fuselage BotStr=0.6569 BotTanAngle=90 CornerRad=0 Height=0.849081 LowStr=0.75 MaxWidthLoc=-0.5 TopStr=1.75 TopTanAngle=90 UpStr=2 Width=0.861792
    8  0.983832     0            0.0668836     general fuselage BotStr=1.5 BotTanAngle=90 CornerRad=0 Height=0.281513 LowStr=1 MaxWidthLoc=0 TopStr=1.5 TopTanAngle=90 UpStr=1.5 Width=0.136063
    9  1            0            0.077205      point

Fuselage "Hub", child of "Fuselage"
  location (X Y Z) -0.435437 0 0.138135, rotation 0 0 0
  bounding box size 0.381 0.3048 0.3048
  mass: Density=20000 Shell_Flag=0 Mass_Area=1 Mass_Prior=0
  Design: Length=0.381
  cross sections:
    n  XLocPercent  YLocPercent  ZLocPercent  shape
    0  0            0            0            point
    1  0.95         0            0            circle Circle_Diameter=0.3048
    2  1            0            0            point

Wing "Vert"
  location (X Y Z) 4.2476 0 0.6096, rotation 90 0 0
  bounding box size 3.76828 0.160127 1.56024
  mass: Density=100 Shell_Flag=0 Mass_Area=1 Mass_Prior=0
  totals: TotalSpan=1.56024 TotalProjectedSpan=1.56024 TotalChord=1.45049 TotalArea=1.93654 TotalAR=1.25706
  root: chord 3.2004, twist 0, NACA 4-series Camber=0 CamberLoc=0.2 ThickChord=0.05
  sections:
    n  Span      Root_Chord  Tip_Chord  Area      Sweep  Sweep_Location  Dihedral  Twist  Twist_Location  tip airfoil
    1  0.184678  3.2004      2.16021    0.494994  20     1               0         0      0.25            NACA 4-series Camber=0 CamberLoc=0.2 ThickChord=0.07
    2  0.184678  2.16021     1.27239    0.316963  20     1               0         0      0.25            NACA 4-series Camber=0 CamberLoc=0.2 ThickChord=0.12
    3  0.159441  1.27239     1.13581    0.191982  20     1               0         0      0.25            as above
    4  0.836859  1.13581     0.767425   0.796368  20     1               0         0      0.25            as above
    5  0.194584  0.767425    0.632856   0.136236  20     1               0         0      0.25            NACA 4-series Camber=0 CamberLoc=0.2 ThickChord=0.1

Wing "Horz"
  location (X Y Z) 6.12648 0 0.4572, rotation 0 -2.5 0
  symmetric about XZ
  bounding box size 1.33349 3.93509 0.165942
  mass: Density=100 Shell_Flag=0 Mass_Area=1 Mass_Prior=0
  totals: TotalSpan=3.93509 TotalProjectedSpan=3.93509 TotalChord=0.904799 TotalArea=4.04019 TotalAR=3.83273
  root: chord 0.1524, twist 0, NACA 4-series Camber=0 CamberLoc=0.2 ThickChord=0.12
  sections:
    n  Span      Root_Chord  Tip_Chord  Area      Sweep  Sweep_Location  Dihedral  Twist  Twist_Location  tip airfoil
    1  0.239969  0.1524      1.33472    0.178431  0      0               0         0      0.25            as above
    2  1.72758   1.33472     0.797357   1.84166   0      0.5             0         0      0.25            as above

Wing "NormalWing"
  location (X Y Z) 1.76071 0 0.8763, rotation 0 0 0
  symmetric about XZ
  bounding box size 1.67901 11.1946 0.415534
  mass: Density=100 Shell_Flag=0 Mass_Area=1 Mass_Prior=0
  totals: TotalSpan=11.2014 TotalProjectedSpan=11.1946 TotalChord=1.44933 TotalArea=16.2345 TotalAR=7.71929
  root: chord 1.67945, twist 2, NACA 6-series (series code 6) A=0.8 IdealCl=0.2 ThickChord=0.15
  sections:
    n  Span    Root_Chord  Tip_Chord  Area     Sweep  Sweep_Location  Dihedral  Twist  Twist_Location  tip airfoil
    1  5.6007  1.67945     1.2192     8.11724  0      0               2         0      0.25            NACA 6-series (series code 6) A=0.8 IdealCl=0.4 ThickChord=0.12

Mesh "MeshGeom"
  location (X Y Z) 0 0 0, rotation 0 0 0

VSPAERO settings: Sref=1.93654 bref=1.56024 cref=1.45049 Xcg=2.31998 Ycg=-7.45072e-07 Zcg=0.376092 AlphaStart=0 AlphaEnd=10 AlphaNpts=1 BetaStart=0 BetaEnd=0 BetaNpts=1 MachStart=0 MachEnd=0 MachNpts=1 ReCref=1e+07 Vinf=100 Rho=0.002377
